// COMSOL Multiphysics 5.5.0.359 model "ecore_transformer_threephase_submission.mph"
// E-Core Transformer
// Outline of the model tree

Parameters
  Rs = 14[ohm]  // resistance
  Ns = 320  // Number of turns
  fu = 50[Hz]  // Frequency of supply voltage
  V = 220[V]  // Supply voltage

Geometry
  geom1 "Geometry 1" (3D, length unit mm)
    wp1: WorkPlane | quickplane = xz; quicky = 10; unite = on
      r1: Rectangle | base = center; size = {160, 70}
      r2: Rectangle | pos = {0, 10}; base = center; size = {140, 50}
      r3: Rectangle | pos = {0, 10}; base = center; size = {20, 50}
      r4: Rectangle | pos = {-40, 10}; base = center; size = {20, 50}
      r5: Rectangle | pos = {40, 10}; base = center; size = {20, 50}
      co1: Compose | input = r1, r2, r3, r4, r5; edge = all; formula = r1-r2+r3+r4+r5
    ext1: Extrude | contributeto = csel1; workplane = wp1; input = wp1; distance = 20
    wp2: WorkPlane | quickz = -15; unite = on
      c1: Circle | type = curve; layername = {Layer 1, Layer 2}; layer = {5, 1}; r = 20
    ext2: Extrude | workplane = wp2; input = wp2; distance = 50
    blk1: Block | base = center; size = {150, 130, 150}
    wp3: WorkPlane | quickz = 50; unite = on
      r1: Rectangle | pos = {-20, -20}; size = {40, 40}
    ext3: Extrude | workplane = wp3; input = wp3; distance = 10
    wp4: WorkPlane | quickz = 60; unite = on
      r1: Rectangle | pos = {-20, -20}; size = {40, 40}
    ext4: Extrude | workplane = wp4; input = wp4; distance = 5
    wp5: WorkPlane | quickz = -15; unite = on
      c1: Circle | pos = {40, 0}; layername = {Layer 1, Layer 2}; layer = {5, 1}; r = 20
    ext5: Extrude | workplane = wp5; input = wp5; distance = 50
    wp6: WorkPlane | quickz = -15; unite = on
      c1: Circle | pos = {-40, 0}; layername = {Layer 1, Layer 2}; layer = {4, 1}; r = 20
    ext6: Extrude | workplane = wp6; input = wp6; distance = 50
    fin: Finalize "Form Union"
    sel1: ExplicitSelection "Primary Winding" | selection = fin(1) domains 18-21, 23, 24, 26, 27; contributeto = csel2.dom
    sel2: ExplicitSelection "Secondary Winding" | selection = fin(1) domains 16, 17, 22, 25; contributeto = csel2.dom

Materials
  mat1: Common "Air" on all domains
    def "Basic"
      thermalexpansioncoefficient = alpha_p(pA,T)
      molarmass = 0.02897[kg/mol]
      bulkviscosity = muB(T)
      relpermeability = 1
      relpermittivity = 1
      dynamicviscosity = eta(T)
      ratioofspecificheat = 1.4
      electricconductivity = 0[S/m]
      heatcapacity = Cp(T)
      density = rho(pA,T)
      thermalconductivity = k(T)
      soundspeed = cs(T)
      eta: Piecewise | arg = T; pieces = {200.0, 1600.0, -8.38278E-7+8.35717342E-8*T^1-7.69429583E-11*T^2+4.6437266E-14*T^3-1.06585607E-17*T^4}; argunit = K; fununit = Pa*s
      Cp: Piecewise | arg = T; pieces = {200.0, 1600.0, 1047.63657-0.372589265*T^1+9.45304214E-4*T^2-6.02409443E-7*T^3+1.2858961E-10*T^4}; argunit = K; fununit = J/(kg*K)
      rho: Analytic | expr = pA*0.02897/R_const[K*mol/J]/T; args = {pA, T}; dermethod = manual; argders = {{pA, d(pA*0.02897/R_const/T,pA)}, {T, d(pA*0.02897/R_const/T,T)}}; argunit = Pa,K; fununit = kg/m^3
      k: Piecewise | arg = T; pieces = {200.0, 1600.0, -0.00227583562+1.15480022E-4*T^1-7.90252856E-8*T^2+4.11702505E-11*T^3-7.43864331E-15*T^4}; argunit = K; fununit = W/(m*K)
      cs: Analytic | expr = sqrt(1.4*R_const[K*mol/J]/0.02897*T); args = T; dermethod = manual; argunit = K; fununit = m/s
      an1: Analytic | funcname = alpha_p; expr = -1/rho(pA,T)*d(rho(pA,T),T); args = {pA, T}; argunit = Pa,K; fununit = 1/K
      an2: Analytic "Analytic 2a" | funcname = muB; expr = 0.6*eta(T); args = T; argunit = K; fununit = Pa*s
    RefractiveIndex
      n = 1
      ki = 0
    NonlinearModel
      BA = (def.gamma+1)/2
  mat2: Common "Soft Iron (Without Losses)" on domains 1, 3, 9, 15, 33-35, 42, 43, 45
    def "Basic"
      electricconductivity = 0[S/m]
      relpermittivity = 1
      relpermeability = 4000
    BHCurve
      normB = BH(normHin)
      normH = BH_inv(normBin)
      Wpm = BH_prim(normHin)
      normHin = sqrt(H1^2+H2^2+H3^2+eps)
      DESCR_PREFIX:normHin = Magnetic field norm
      normBin = sqrt(B1^2+B2^2+B3^2+eps)
      DESCR_PREFIX:normBin = Magnetic flux density norm
      BH: Interpolation
        table = 
          {0, 0}
          {663.146, 1}
          {1067.5, 1.1}
          {1705.23, 1.2}
          {2463.11, 1.3}
          {3841.67, 1.4}
          {5425.74, 1.5}
          {7957.75, 1.6}
          {12298.3, 1.7}
          {20462.8, 1.8}
          {32169.6, 1.9}
          {61213.4, 2}
          {111408, 2.1}
          {188487.757, 2.2}
          {267930.364, 2.3}
          {347507.836, 2.4}
        extrap = linear
        argunit = A/m
        fununit = T
        defineinv = on
        defineprimfun = on
    EffectiveBHCurve
      normBeff = BHeff(normHeffin)
      normHeff = BHeff_inv(normBeffin)
      normHeffin = sqrt(realdot(H1,H1)+realdot(H2,H2)+realdot(H3,H3)+eps)
      DESCR_PREFIX:normHeffin = Effective magnetic field norm
      normBeffin = sqrt(realdot(B1,B1)+realdot(B2,B2)+realdot(B3,B3)+eps)
      DESCR_PREFIX:normBeffin = Effective magnetic flux density norm
      BHeff: Interpolation
        table = 
          {0, 0}
          {663.146, 1.00000005169}
          {1067.5, 1.49364951241}
          {1705.23, 1.94153284613}
          {2463.11, 2.25776566937}
          {3841.67, 2.60998064243}
          {5425.74, 2.86644520908}
          {7957.75, 3.14414380972}
          {12298.3, 3.44853805165}
          {20462.8, 3.78167119737}
          {32169.6, 4.05834559011}
          {61213.4, 4.42064655295}
          {111408, 4.72127408955}
          {188487.757, 4.97214814072}
          {267930.364, 5.14551086086}
          {347507.836, 5.24551086143}
        extrap = linear
        argunit = A/m
        fununit = T
        defineinv = on
  mat3: Common "Aluminum [solid,bulk]" on domains 14
    def "Basic"
      thermalconductivity = k_solid_bulk_1(T[1/K])[W/(m*K)]
      resistivity = res_solid_1(T[1/K])[ohm*m]
      thermalexpansioncoefficient = (alpha_solid_1(T[1/K])[1/K]+(Tempref-293[K])*if(abs(T-Tempref)>1e-3,(alpha_solid_1(T[1/K])[1/K]-alpha_solid_1(Tempref[1/K])[1/K])/(T-Tempref),d(alpha_solid_1(T[1/K])[1/K],T)))/(1+alpha_solid_1(Tempref[1/K])[1/K]*(Tempref-293[K]))
      heatcapacity = C_solid_1(T[1/K])[J/(kg*K)]
      electricconductivity = sigma_solid_1(T[1/K])[S/m]
      HC = HC_solid_1(T[1/K])[J/(mol*K)]
      VP = VP_solid_1(T[1/K])[Pa]
      density = rho_solid_1(T[1/K])[kg/m^3]
      TD = TD_solid_1(T[1/K])[m^2/s]
      relpermeability = 1
      relpermittivity = 1
      k_solid_bulk_1: Piecewise
        arg = T
        pieces = 
          {0.0, 14.0, 3895.7*T^1+203.42*T^2-56.434*T^3+2.0664*T^4}
          {14.0, 50.0, 49148.0-2950.9*T^1+63.175*T^2-0.46605*T^3}
          {50.0, 82.0, 15117.0-626.0*T^1+10.348*T^2-0.078676*T^3+2.2917E-4*T^4}
          {82.0, 297.0, 913.09-12.076*T^1+0.080875*T^2-2.3988E-4*T^3+2.6487E-7*T^4}
          {297.0, 933.0, 39.646+1.684*T^1-0.0054134*T^2+8.4313E-6*T^3-6.537E-9*T^4+2.002E-12*T^5}
      res_solid_1: Piecewise
        arg = T
        pieces = 
          {1.0, 19.5, 1.091612E-12-1.10726E-13*T^1+3.696901E-14*T^2-2.781934E-15*T^3+1.008733E-16*T^4}
          {19.5, 50.6, -3.323487E-11+7.29041E-12*T^1-4.771551E-13*T^2+1.071535E-14*T^3}
          {50.6, 200.0, 1.0445563E-10-3.988929E-11*T^1+1.061978E-12*T^2-2.337666E-15*T^3}
          {200.0, 933.0, -1.037048E-8+1.451201E-10*T^1-8.192563E-14*T^2+6.619834E-17*T^3}
      alpha_solid_1: Piecewise
        arg = T
        pieces = 
          {20.0, 220.0, 1.371347E-5+7.808536E-8*T^1-2.568882E-10*T^2+3.615726E-13*T^3}
          {220.0, 610.0, 5.760185E-6+1.707141E-7*T^1-6.548135E-10*T^2+1.220625E-12*T^3-1.064883E-15*T^4+3.535918E-19*T^5}
          {610.0, 933.0, 1.9495E-5+9.630182E-9*T^1+9.462013E-13*T^2}
      C_solid_1: Piecewise
        arg = T
        pieces = 
          {100.0, 320.0, -290.416126+11.1810036*T^1-0.0412540099*T^2+7.11275398E-5*T^3-4.60821994E-8*T^4}
          {320.0, 933.0, 595.658507+1.51302896*T^1-0.00207006538*T^2+1.30360846E-6*T^3}
      sigma_solid_1: Piecewise
        arg = T
        pieces = 
          {1.0, 19.5, 1/(1.008733E-16*T^4-2.781934E-15*T^3+3.696901E-14*T^2-1.107260E-13*T+1.091612E-12)}
          {19.5, 50.6, 1/(1.071535E-14*T^3-4.771551E-13*T^2+7.290410E-12*T-3.323487E-11)}
          {50.6, 200.0, 1/(-2.337666E-15*T^3+1.061978E-12*T^2-3.988929E-11*T+1.0445563E-10)}
          {200.0, 933.0, 1/(6.619834E-17*T^3-8.192563E-14*T^2+1.451201E-10*T-1.037048E-08)}
      HC_solid_1: Piecewise
        arg = T
        pieces = 
          {100.0, 320.0, -7.83586214+0.301680207*T^1-0.00111309504*T^2+1.91912758E-6*T^3-1.24336723E-9*T^4}
          {320.0, 933.0, 16.0717565+0.0408237901*T^1-5.58534712E-5*T^2+3.51733064E-8*T^3}
      VP_solid_1: Piecewise | arg = T; pieces = {293.0, 933.0, (exp((-1.73420000e+04/T-7.92700000e-01*log10(T)+1.23398100e+01)*log(10.0)))*1.33320000e+02}
      rho_solid_1: Piecewise
        arg = T
        pieces = 
          {20.0, 130.0, 2734.317-0.02751647*T^1+0.001016054*T^2-1.700864E-5*T^3+5.734155E-8*T^4}
          {130.0, 933.0, 2736.893-0.006011681*T^1-7.012444E-4*T^2+1.3582E-6*T^3-1.367828E-9*T^4+5.177991E-13*T^5}
      TD_solid_1: Piecewise
        arg = T
        pieces = 
          {100.0, 199.0, 0.002133702-4.812031E-5*T^1+4.79456E-7*T^2-2.464699E-9*T^3+6.456561E-12*T^4-6.843904E-15*T^5}
          {199.0, 384.0, -2.668677E-4+8.197942E-6*T^1-6.451378E-8*T^2+2.363432E-10*T^3-4.135319E-13*T^4+2.797142E-16*T^5}
          {384.0, 933.0, 1.171846E-4-7.450324E-8*T^1+5.694632E-11*T^2-4.064992E-14*T^3}
    ThermalExpansion
      alphatan = CTE_solid_1(T[1/K])[1/K]
      dL = (dL_solid_1(T[1/K])-dL_solid_1(Tempref[1/K]))/(1+dL_solid_1(Tempref[1/K]))
      alphatanIso = CTE_solid_1(T[1/K])[1/K]
      dLIso = (dL_solid_1(T[1/K])-dL_solid_1(Tempref[1/K]))/(1+dL_solid_1(Tempref[1/K]))
      dL_solid_1: Piecewise
        arg = T
        pieces = 
          {20.0, 188.0, -0.004116601-4.000347E-6*T^1+5.370388E-8*T^2+3.714324E-10*T^3-1.45073E-12*T^4}
          {188.0, 933.0, -0.00631208932+2.156284E-5*T^1-4.744254E-9*T^2+1.811015E-11*T^3-7.336673E-15*T^4}
      CTE_solid_1: Piecewise
        arg = T
        pieces = 
          {20.0, 79.0, -3.317274E-6+3.068688E-7*T^1-1.004816E-8*T^2+1.724768E-10*T^3-8.846061E-13*T^4}
          {79.0, 230.0, -2.288925E-5+6.674915E-7*T^1-4.402622E-9*T^2+1.455358E-11*T^3-1.910622E-14*T^4}
          {230.0, 900.0, 1.24296E-5+5.050772E-8*T^1-5.806556E-11*T^2+3.014305E-14*T^3}
    Enu "Young's modulus and Poisson's ratio"
      youngsmodulus = E(T[1/K])[Pa]
      poissonsratio = nu(T[1/K])
      E: Piecewise | arg = T; pieces = {0.0, 773.0, 7.659324E10+2007396.0*T^1-186458.4*T^2+419.2175*T^3-0.3495083*T^4}
      nu: Piecewise | arg = T; pieces = {0.0, 773.0, 0.3238668+3.754548E-6*T^1+2.213647E-7*T^2-6.565023E-10*T^3+4.21277E-13*T^4+3.170505E-16*T^5}
    KG "Bulk modulus and shear modulus"
      K = kappa(T[1/K])[Pa]
      G = mu(T[1/K])[Pa]
      mu: Piecewise | arg = T; pieces = {0.0, 773.0, 2.894653E10-120032.4*T^1-69037.36*T^2+158.6722*T^3-0.1348974*T^4}
      kappa: Piecewise | arg = T; pieces = {0.0, 773.0, 7.252413E10+1872882.0*T^1-71106.44*T^2+52.7109*T^3}

Physics
  mf: InductionCurrents "Magnetic Fields" on all domains
    dependent variable A = {Ax, Ay, Az}
    ShapeProperty.order_magneticvectorpotential = 1
    al1: AmperesLaw "Ampère's Law 1" (default)
    mi1: MagneticInsulation (default)
    init1: init "Initial Values 1" (default)
    al2: AmperesLaw "Ampère's Law 2" on domains 1, 3, 9, 15, 33-35, 42, 43, 45 | ConstitutiveRelationBH = BHCurve
    coil1: Coil on domains 4, 5, 10, 13
      ConductorModel = Multi
      CoilExcitation = CircuitCurrent
      CoilType = Numeric
      N = Ns
      AreaFrom = Diameter
      coilWindDiameter = 0.7[mm]
      coilWindArea = 0.38e-6[m^2]
      ccc1: CoilCurrentCalculation "Geometry Analysis 1" (default)
        ct1: CoilTerminal "Input 1" on boundaries 47
    coil2: Coil on selection geom1_sel2
      ConductorModel = Multi
      CoilExcitation = CircuitCurrent
      CoilType = Numeric
      N = Ns
      AreaFrom = Diameter
      coilWindDiameter = 0.7[mm]
      coilWindArea = 0.38e-6[m^2]
      ccc1: CoilCurrentCalculation "Geometry Analysis 1" (default)
        ct1: CoilTerminal "Input 1" on boundaries 119
    gfa1: GaugeFixingA "Gauge Fixing for A-field 1" on all domains | equationForm = Stationary
    fcal1: ForceCalculation on domains 14, 15
    al3: AmperesLaw "Ampère's Law 3" on domains 14
    coil3: Coil on domains 28, 29, 38, 41
      ConductorModel = Multi
      CoilExcitation = CircuitCurrent
      CoilType = Numeric
      N = Ns
      AreaFrom = Diameter
      coilWindDiameter = 0.7[mm]
      ccc1: CoilCurrentCalculation "Geometry Analysis 1" (default)
        ct1: CoilTerminal "Input 1" on boundaries 204
  cir: Circuit "Electrical Circuit"
    dependent variable voltages
    gnd1: GroundNode
    V1: VoltageSource "Voltage Source V1" | Connections = {1, 0}; sourceType = SineSource; value = V; freq = fu
    IvsU1: ModelDeviceIV "External I vs. U 1" | V_src = root.comp1.mf.VCoil_1; Connections = {2, 1}
    R1: Resistor "Resistor R1" | R = Rs; Connections = {0, 2}
    V2: VoltageSource "Voltage Source V2"
      Connections = {4, 0}
      sourceType = SineSource
      value = V
      phase = -2/3*pi
      freq = fu
    IvsU3: ModelDeviceIV "External I vs. U 3" | V_src = root.comp1.mf.VCoil_2; Connections = {5, 4}
    R3: Resistor "Resistor R3" | R = Rs; Connections = {0, 5}
    V3: VoltageSource "Voltage Source V3"
      Connections = {6, 0}
      sourceType = SineSource
      value = V
      phase = 2/3*pi
      freq = fu
    IvsU4: ModelDeviceIV "External I vs. U 4" | V_src = root.comp1.mf.VCoil_3; Connections = {7, 6}
    R4: Resistor "Resistor R4" | R = Rs; Connections = {0, 7}

Mesh
  mesh1 "Mesh 1"
    size: MeshSizeDefault | hmax = 48; hmin = 8.64; hcurve = 0.9; hnarrow = 0.2; hgrad = 1.85; hauto = 8
    ftet1: FreeTet "Free Tetrahedral 1" on entire geometry
      size1: Size on domains 1, 3, 9, 16-27, 33-35, 42, 43, 45 | hmax = 8; custom = on

Studies
  std1 "Study 1"
    ccc: CoilCurrentCalculation "Coil Geometry Analysis" | CoilName = 1
  std2 "Study 2"
    time: Transient "Time Dependent"
      tlist = range(0,5e-4,0.05)
      usesol = on
      notsolmethod = sol
      notstudy = std1
      useparam = on
      pname = Ns
      plistarr = 320,215

Solver configurations
  sol1 "Solution 1" (study std1)
    v1: Variables "Dependent Variables 1"
    s1: Stationary "Stationary Solver 1"
      dDef: Direct
      se1: Segregated | segterm = itertol; segiter = 6
        ss1: SegregatedStep
          segvar = {comp1_mf_coil1_ccc1_s, comp1_mf_coil2_ccc1_s, comp1_mf_coil3_ccc1_s}
          linsolver = dDef
        ss2: SegregatedStep
          segvar = {comp1_mf_coil1_ccc1_p, comp1_mf_coil1_ccc1_lm, comp1_mf_coil2_ccc1_p, comp1_mf_coil2_ccc1_lm, comp1_mf_coil3_ccc1_p, comp1_mf_coil3_ccc1_lm}
          linsolver = dDef
  sol2 "Solution 2" (study std2)
    v1: Variables "Dependent Variables 1"
    t1: Time "Time-Dependent Solver 1" | tlist = range(0,5e-4,0.05); tstepsbdf = intermediate; estrat = exclude
      fc1: FullyCoupled | linsolver = d1; jtech = onevery
      d1: Direct "Suggested Direct Solver () (merged)" | linsolver = pardiso
      tpDef: TimeParametric

Datasets
  dset1: Solution | solution = sol1
  dset2: Solution on domains 1, 3, 9, 16-27, 33-35, 42, 43, 45 | solution = sol2

Derived values
  gev1: EvalGlobal "Global Evaluation 1"
    data = dset1
    table = tbl1
    expr = {mf.Forcex_0, mf.Forcey_0, mf.Forcez_0}
    descr = {"Electromagnetic force, x component", "Electromagnetic force, y component", "Electromagnetic force, z component"}

Tables
  tbl1: Table
    Electromagnetic force, x component (N) | Electromagnetic force, y component (N) | Electromagnetic force, z component (N) | Electromagnetic force, x component (N) | Electromagnetic force, y component (N) | Electromagnetic force, z component (N)
    0 | 0 | 0 | 0 | 0 | 0

Plots
  pg1: PlotGroup3D "3D Plot Group 1" | data = dset2
    vol1: Volume | expr = mf.normB
      sel1: Selection on domains 1, 3-5, 9, 10, 13-17, 22, 25, 28, 29, 33-35, 38, 41-45
    arwv1: ArrowVolume | expr = {mf.Jx, mf.Jy, mf.Jz}; descr = Current density; xnumber = 10; ynumber = 10; znumber = 5
      sel1: Selection on domains 5, 10, 13, 17, 22, 25, 29, 38, 41
    arwv2: ArrowVolume (disabled)
      expr = {mf.Jx, mf.Jy, mf.Jz}
      descr = Current density
      xnumber = 10
      ynumber = 10
      znumber = 5
      sel1: Selection on selection geom1_sel2
  pg2: PlotGroup3D "3D Plot Group 2" on domains 1, 3, 9, 15, 33-35, 42, 43, 45 | data = dset2
    slc1: Slice | expr = mf.normB; quickplane = zx; quickynumber = 1
    arwv1: ArrowVolume | expr = {mf.Bx, mf.By, mf.Bz}; xnumber = 10; ynumber = 10; znumber = 100
  pg3: PlotGroup1D "Induced voltage in primary" (disabled)
    data = dset2
    xlabel = Time (seconds)
    ylabel = Induced voltage in primary (V)
    glob1: Global | expr = mf.VCoil_1; unit = V; descr = Induced voltage in primary winding
  pg4: PlotGroup1D "Induced voltage in secondary"
    data = dset2
    xlabel = Time (seconds)
    ylabel = Induced voltage in secondary (V)
    glob1: Global | expr = mf.VCoil_2; unit = V; descr = Induced voltage in secondary winding
  pg5: PlotGroup1D "Current in primary winding" (disabled)
    data = dset2
    xlabel = Time (seconds)
    ylabel = Current in primary winding (A)
    glob1: Global | expr = mf.ICoil_1; unit = A; descr = Current in primary winding
  pg6: PlotGroup1D "Current in secondary winding"
    data = dset2
    xlabel = Time (seconds)
    ylabel = Current in secondary winding (A)
    glob1: Global
      expr = {mf.ICoil_1, mf.ICoil_2, mf.ICoil_3}
      unit = {A, A, A}
      descr = {Coil current A, Coil current B, Coil current C}
  pg9: PlotGroup1D "1D Plot Group 9" | data = dset2
    glob1: Global
      expr = {mf.Forcez_0, mf.Forcex_0}
      unit = {N, N}
      descr = {"Electromagnetic force, z component", "Electromagnetic force, x component"}
  pg10: PlotGroup3D "3D Plot Group 10" on domains 1, 3, 9, 14-17, 22, 25, 33-35, 42, 43, 45 | data = dset2
    slc1: Slice | expr = mf.normB; quickplane = zx; quickynumber = 1