// COMSOL Multiphysics 5.4.0.246 model "levitation_submission.mph"
// An Electrodynamic Levitation Model
// Outline of the model tree

Parameters
  f0 = 50[Hz]  // Supply frequency
  Ni = 960  // Number of turns in inner coil
  No = 320  // Number of turns in outer coil
  sigma = 3.4e7[S/m]  // Conductivity of aluminum
  I0 = 55[A]  // Coil current
  d_wire = 1.2[mm]  // Coil wire diameter
  M_disc = 0.08[kg]  // Mass of aluminum disc
  z0 = 7.8[mm]  // Initial position of aluminum disc

Variables
  var1 "Variables 1"
    F_g = M_disc*g_const  // Gravitational force
  var2 "z-Parametrization, Top" on domains 7, 13
    s2 = (50[mm]-Z)/(50[mm]-27[mm])
  var3 "z-Parametrization, Center" on domains 5, 6, 11, 12
    s2 = 1
  var4 "z-Parametrization, Bottom" on domains 4, 10
    s2 = (Z-2.5[mm])/(9.5[mm]-2.5[mm])
  var5 "r-Parametrization, Left" on domains 4-7
    s1 = 1
  var6 "r-Parametrization, Right" on domains 10-13
    s1 = (70[mm]-R)/(70[mm]-20[mm])

Selections
  sel1: Explicit "Infinite Element Domain" on domains 1, 8, 14-21

Probes
  var1: GlobalVariable "Global Variable Probe 1" | expr = u; unit = mm; descr = Plate displacement; table = tbl1
  var2: GlobalVariable "Global Variable Probe 2"
    expr = mf.Forcez_0
    unit = N
    descr = Electromagnetic force, z-component
    table = tbl2

Coordinate systems
  ie1: InfiniteElement "Infinite Element Domain 1" on selection sel1 | ScalingType = Cylindrical

Geometry
  geom1 "Geometry 1" (2D axisymmetric, length unit mm)
    r1: Rectangle "Coil 1" | pos = {5, -25}; base = center; size = {10, 50}
    r2: Rectangle "Coil 2" | pos = {22, -25}; base = center; size = {4, 50}
    r3: Rectangle
      pos = {0, 2.5}
      layername = {Layer 1, Layer 2, Layer 3, Layer 4}
      layer = {(39-15)/2-2.5, 10, 5, 50-(39+15)/2}
      size = {80, 60-2.5}
    r4: Rectangle
      pos = {0, 2.5}
      layername = {Layer 1, Layer 2}
      layer = {20, 50}
      layerleft = on
      layerbottom = off
      size = {80, 60-2.5}
    r5: Rectangle | pos = {0, -70}; layername = Layer 1; layer = 10; layerright = on; size = {80, 72.5}
    fin: Finalize "Form Union"

Materials
  mat1: Common "Air" on all domains
    def "Basic"
      relpermeability = 1
      electricconductivity = 0
      relpermittivity = 1
  mat2: Common "Aluminum" on domains 5, 6
    def "Basic"
      relpermeability = 1
      electricconductivity = sigma
      relpermittivity = 1
  mat3: Common "Soft Iron (Without Losses)" on domains 3, 6
    def "Basic"
      electricconductivity = 0[S/m]
      relpermittivity = 1
      relpermeability = 4000
    BHCurve
      normB = BH(normHin)
      normH = BH_inv(normBin)
      Wpm = BH_prim(normHin)
      normHin = sqrt(H1^2+H2^2+H3^2)
      normBin = sqrt(B1^2+B2^2+B3^2)
      DESCR_PREFIX:normHin = Magnetic field norm
      DESCR_PREFIX:normBin = Magnetic flux density norm
      BH: Interpolation
        table = {{0, 0}, {663.146, 1}, {1067.5, 1.1}, {1705.23, 1.2}, {2463.11, 1.3}, {3841.67, 1.4}, {5425.74, 1.5}, {7957.75, 1.6}, {12298.3, 1.7}, {20462.8, 1.8}, {32169.6, 1.9}, {61213.4, 2.0}, {111408, 2.1}, {175070, 2.2}, {261469, 2.3}, {318310, 2.4}}
        extrap = linear
        argunit = A/m
        fununit = T
        defineinv = on
        defineprimfun = on
    EffectiveBHCurve
      normBeff = BHeff(normHeffin)
      normHeff = BHeff_inv(normBeffin)
      normHeffin = sqrt(realdot(H1,H1)+realdot(H2,H2)+realdot(H3,H3))
      normBeffin = sqrt(realdot(B1,B1)+realdot(B2,B2)+realdot(B3,B3))
      DESCR_PREFIX:normHeffin = Effective magnetic field norm
      DESCR_PREFIX:normBeffin = Effective magnetic flux density norm
      BHeff: Interpolation
        table = 
          {0, 0}
          {663.146, 1}
          {1067.5, 1.49439064869}
          {1705.23, 1.94163007382}
          {2463.11, 2.25761949405}
          {3841.67, 2.72975505967}
          {5425.74, 2.87566514896}
          {7957.75, 3.14902923402}
          {12298.3, 3.45293721268}
          {20462.8, 3.7845615956}
          {32169.6, 4.06019591028}
          {61213.4, 4.42177726607}
          {111408, 4.72195400511}
          {175070, 4.94119864969}
          {261469, 5.14465994384}
          {318310, 5.25334603964}
        extrap = linear
        argunit = A/m
        fununit = T
        defineinv = on

Physics
  mf: InductionCurrents "Magnetic Fields" on all domains
    dependent variable A = {Ar, Aphi, Az}
    MeshControl.EnableMeshControl = 1
    al1: AmperesLaw "Ampère's Law 1" (default)
    axi1: AxialSymmetry (default)
    mi1: MagneticInsulation (default)
    init1: init "Initial Values 1" (default)
    al2: AmperesLaw "Ampère's Law 2" on domains 5, 6 | materialType = solid
    coil1: Coil (disabled) on domains 3
      ConductorModel = Multi
      ICoil = I0*sin(2*pi*f0*t)
      N = Ni
      AreaFrom = Diameter
      coilWindDiameter = d_wire
      materialType = solid
    coil2: Coil on domains 9
      ConductorModel = Multi
      ICoil = I0*sin(2*pi*f0*t)
      N = No
      AreaFrom = Diameter
      coilWindDiameter = d_wire
      ConstitutiveRelationBH = RelativePermeability
      materialType = solid
    fcal1: ForceCalculation on domains 5, 6
  ge: GlobalEquations "Plate Dynamics"
    ge1: GlobalEquations
      name = v
      equation = d(v,t)+(F_g-mf.Forcez_0)/M_disc
      description = Plate velocity
      valueType = complex
      DependentVariableQuantity = velocity
      CustomDependentVariableUnit = m
      SourceTermQuantity = acceleration
      CustomSourceTermUnit = m
    ge2: GlobalEquations
      name = u
      equation = ut-v
      initialValueU = z0
      description = Plate position
      valueType = complex
      DependentVariableQuantity = displacement
      CustomDependentVariableUnit = m
      SourceTermQuantity = velocity
      CustomSourceTermUnit = m
  ale: MovingMesh on domains 4-7, 10-13
    FrameSettings.geometryShapeOrder = 1
    fix1: FixedMesh (default)
    disp1: PrescribedMeshDisplacement (default)
    pres1: PrescribedDeformation on all domains | dx = {0, (u-18[mm])*s1*s2}

Mesh
  mesh1 "Mesh 1" (physics-controlled)

Studies
  std1 "Study 1"
    time: Transient "Time Dependent" | tlist = range(0,0.01,1.7); usertol = on; rtol = 0.001

Solver configurations
  sol1 "Solution 1" (study std1)
    v1: Variables "Dependent Variables 1"
    t1: Time "Time-Dependent Solver 1" | tlist = range(0,0.01,1.7)
      dDef: Direct
      fc1: FullyCoupled | linsolver = dDef

Datasets
  dset1: Solution on domains 4-7, 10-13 | solution = sol1
  dset2: Solution "Probe Solution 2" | solution = sol1
  dset3: Solution on domains 2-7, 9-13 | solution = sol1
  dset4: Solution on domains 5 | solution = sol1
  rev1: Revolve2D "Revolution 2D 1" | data = dset4; layermethod = fine
  rev2: Revolve2D "Revolution 2D 2" | data = dset4; layermethod = fine
  BH_ds1: Grid1D
  ptds1: CutPoint1D
    data = BH_ds1
    pointx = 0.0 663.146 1067.5 1705.23 2463.11 3841.67 5425.74 7957.75 12298.3 20462.8 32169.6 61213.4 111408.0 175070.0 261469.0 318310.0
  BH_ds2: Grid1D
  BH_ds3: Grid1D

Derived values
  gev1: EvalGlobal "Global Variable Probe 1" | data = dset2; table = tbl1; expr = u
  gev2: EvalGlobal "Global Variable Probe 2" | data = dset2; table = tbl2; expr = mf.Forcez_0

Tables
  tbl1: Table "Probe Table 1"
    Time (s) | Plate displacement (mm)
    0 | 7.8
    3.27182e-08 | 7.8
    5.72043e-08 | 7.8
    1.06176e-07 | 7.8
    2.04121e-07 | 7.8
    4.00009e-07 | 7.8
    7.91787e-07 | 7.8
    1.57534e-06 | 7.8
    2.3589e-06 | 7.8
    3.92601e-06 | 7.8
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  tbl2: Table "Probe Table 2"
    Time (s) | Electromagnetic force, z-component (N)
    0 | 0
    3.27182e-08 | 8.5544e-09
    5.72043e-08 | 2.61522e-08
    1.06176e-07 | 9.01134e-08
    2.04121e-07 | 3.33216e-07
    4.00009e-07 | 1.28093e-06
    7.91787e-07 | 5.02865e-06
    1.57534e-06 | 1.99803e-05
    2.3589e-06 | 4.49317e-05
    3.92601e-06 | 0.000125212
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  tbl3: Table "Experimental Data"
    Time(ms) | Displacement(mm)
    0 | 3.7
    0.0099 | 4
    0.0198 | 4.9
    0.0297 | 6.9
    0.0396 | 9.7
    0.0496 | 12.8
    0.0595 | 15.6
    0.0694 | 17.4
    0.0793 | 18
    0.0892 | 18.1
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
Plots
  pg1: PlotGroup2D "2D Plot Group 1" | data = dset1
    mesh1: Mesh
    surf1: Surface | expr = ale.dxz; descr = Prescribed mesh displacement, z component
  pg2: PlotGroup1D "Plate Dynamics Comparison" | title = Axial Plate Displacement (mm); xlabel = Time (s)
    tblp1: Table "Probe Table Graph 1" | table = tbl1; xaxisdata = auto; plotcolumns = 2; legends = Computed
  pg3: PlotGroup1D "Electromagnetic Force, z-component" | title = Electromagnetic Force, z-component (N)
    tblp1: Table "Probe Table Graph 1" | table = tbl2
  pg4: PlotGroup2D "Magnetic Flux Density" | data = dset3; title = Magnetic flux density norm (T) and streamlines
    surf1: Surface | expr = mf.normB
    con1: Contour | expr = mf.Aphi; descr = Magnetic vector potential, phi component
  pg5: PlotGroup3D "Current Density" | data = rev1
    vol1: Volume | data = rev1; expr = mf.Jphi; descr = Current density, phi component
  pg6: PlotGroup1D "1D Plot Group 6" | data = dset2
    glob1: Global
      expr = {mf.Forcephi_0, mf.Forcez_0}
      unit = {N, N}
      descr = {"Electromagnetic force, phi component", "Electromagnetic force, z component"}
  pg7: PlotGroup1D "1D Plot Group 7" | data = BH_ds1; title = BH(t) (T); xlabel = t (A/m); ylabel = BH(t) (T)
    plot1: LineGraph | expr = comp1.mat3.BHCurve.BH(root.t[A/m])
    ptplot1: PointGraph | data = ptds1; expr = comp1.mat3.BHCurve.BH(root.t[A/m])
    plot2: LineGraph "Left Extrapolation" | data = BH_ds2; expr = comp1.mat3.BHCurve.BH(root.t[A/m])
    plot3: LineGraph "Right Extrapolation" | data = BH_ds3; expr = comp1.mat3.BHCurve.BH(root.t[A/m])

Exports
  anim1: Animation | target = player; maxframes = 50; options = off; axes = on